;; 1. Based on: 27
;; 2. Description:
;;    Forcing NITER=300 with CTYPE=1 after 50 iterations. Not duplicating BASE
;; 3. Label:
;;    Base model
$SIZES      MAXIDS=21000 PD=60 LVR=60
$PROBLEM    Rerun on run15 to get IIV
$INPUT      ID ROW SUBJID STDY SITEID AGEDAYS AGE AGEYI DV WAZ
            ANTPTNUM ANTPTNUMID BIRTHLEN BIRTHWT BMI CHLDADLT CHLDDR
            CRWDINDX DLVLOCN DURBRST FAGE FEDUCYRS FEEDINGN FHTCM
            GAGEBRTH H2OAVAIL HCACCESS HCUTILIZ HOMETYPE HTCM INCTOT
            LENCM MAGE FSMAGE MATEMPQT MEDUCYRS MHTCM MMARITN NADULTF
            NADULTM NCHLD NFCHILD NMCHILD NPERSON NROOMS PRTY RACEN
            SANITATN SESN SEXN SMOKED WTKG MDV FREMTYPE
$DATA      Data/frem_dataset21-Analysis.csv IGNORE=@
$PRED

   TVBASE   = THETA(1)
   TVPLMAX  = THETA(2)
   TVHLKON  = THETA(3)
   TVHLKOFF = THETA(4)
   TVBASSL  = THETA(5)
   TVBP     = THETA(6)

   MU_1    = TVBASE
   MU_2    = TVPLMAX
   MU_3    = LOG(TVHLKON)
   MU_4    = LOG(TVHLKOFF)
   MU_5    = TVBASSL
   MU_6    = LOG(TVBP)

   BASE    =     MU_1 + ETA(1)
   PLMAX   =     MU_2 + ETA(2)
   HLKON   = EXP(MU_3 + ETA(3))
   HLKOFF  = EXP(MU_4 + ETA(4))
   BASSL   =     MU_5 + ETA(5)
   BP      = EXP(MU_6 + ETA(6))

   KON     = LOG(2)/HLKON
   KOFF    = LOG(2)/HLKOFF

   BASFAC1   =  BASSL*AGE
   BASFAC2   =  BASSL*BP

   PHI      = AGE**2.25/(AGE**2.25 + BP**2.25)

   MYBASE   = BASE + (1-PHI)*BASFAC1 + PHI*BASFAC2

   IPRED = MYBASE-PLMAX*KON*(EXP(-KOFF*AGE)-EXP(-KON*AGE))/(KON-KOFF)

   W       = 1
g   IRES    = DV - IPRED
   IWRES   = IRES/W
   Y       = IPRED + W*EPS(1)

MU_7 = THETA(7)
      MU_8 = THETA(8)
      MU_9 = THETA(9)
      MU_10 = THETA(10)
      MU_11 = THETA(11)
      MU_12 = THETA(12)
      MU_13 = THETA(13)
      MU_14 = THETA(14)
      MU_15 = THETA(15)
      MU_16 = THETA(16)
      MU_17 = THETA(17)
      MU_18 = THETA(18)
      MU_19 = THETA(19)
      MU_20 = THETA(20)
      MU_21 = THETA(21)
      MU_22 = THETA(22)
      MU_23 = THETA(23)
      MU_24 = THETA(24)
      MU_25 = THETA(25)
      MU_26 = THETA(26)
      MU_27 = THETA(27)
      MU_28 = THETA(28)
      MU_29 = THETA(29)
      MU_30 = THETA(30)
      MU_31 = THETA(31)
      MU_32 = THETA(32)
      MU_33 = THETA(33)
      MU_34 = THETA(34)
      MU_35 = THETA(35)
      MU_36 = THETA(36)
      MU_37 = THETA(37)
      MU_38 = THETA(38)
      MU_39 = THETA(39)
      MU_40 = THETA(40)
      MU_41 = THETA(41)
      MU_42 = THETA(42)
      MU_43 = THETA(43)
      MU_44 = THETA(44)
      MU_45 = THETA(45)
      MU_46 = THETA(46)
      MU_47 = THETA(47)
      MU_48 = THETA(48)
      MU_49 = THETA(49)
      MU_50 = THETA(50)
      MU_51 = THETA(51)
      MU_52 = THETA(52)
      MU_53 = THETA(53)
      MU_54 = THETA(54)
      MU_55 = THETA(55)
      MU_56 = THETA(56)
      MU_57 = THETA(57)
      MU_58 = THETA(58)

COV7 = MU_7 + ETA(7)
      COV8 = MU_8 + ETA(8)
      COV9 = MU_9 + ETA(9)
      COV10 = MU_10 + ETA(10)
      COV11 = MU_11 + ETA(11)
      COV12 = MU_12 + ETA(12)
      COV13 = MU_13 + ETA(13)
      COV14 = MU_14 + ETA(14)
      COV15 = MU_15 + ETA(15)
      COV16 = MU_16 + ETA(16)
      COV17 = MU_17 + ETA(17)
      COV18 = MU_18 + ETA(18)
      COV19 = MU_19 + ETA(19)
      COV20 = MU_20 + ETA(20)
      COV21 = MU_21 + ETA(21)
      COV22 = MU_22 + ETA(22)
      COV23 = MU_23 + ETA(23)
      COV24 = MU_24 + ETA(24)
      COV25 = MU_25 + ETA(25)
      COV26 = MU_26 + ETA(26)
      COV27 = MU_27 + ETA(27)
      COV28 = MU_28 + ETA(28)
      COV29 = MU_29 + ETA(29)
      COV30 = MU_30 + ETA(30)
      COV31 = MU_31 + ETA(31)
      COV32 = MU_32 + ETA(32)
      COV33 = MU_33 + ETA(33)
      COV34 = MU_34 + ETA(34)
      COV35 = MU_35 + ETA(35)
      COV36 = MU_36 + ETA(36)
      COV37 = MU_37 + ETA(37)
      COV38 = MU_38 + ETA(38)
      COV39 = MU_39 + ETA(39)
      COV40 = MU_40 + ETA(40)
      COV41 = MU_41 + ETA(41)
      COV42 = MU_42 + ETA(42)
      COV43 = MU_43 + ETA(43)
      COV44 = MU_44 + ETA(44)
      COV45 = MU_45 + ETA(45)
      COV46 = MU_46 + ETA(46)
      COV47 = MU_47 + ETA(47)
      COV48 = MU_48 + ETA(48)
      COV49 = MU_49 + ETA(49)
      COV50 = MU_50 + ETA(50)
      COV51 = MU_51 + ETA(51)
      COV52 = MU_52 + ETA(52)
      COV53 = MU_53 + ETA(53)
      COV54 = MU_54 + ETA(54)
      COV55 = MU_55 + ETA(55)
      COV56 = MU_56 + ETA(56)
      COV57 = MU_57 + ETA(57)
      COV58 = MU_58 + ETA(58)
;;;FREM CODE BEGIN COMPACT
      IF(FREMTYPE.EQ.100) THEN
;       BIRTHLEN
        Y = COV7 + EPS(2)
        IPRED = COV7
      ENDIF
      IF(FREMTYPE.EQ.200) THEN
;       BIRTHWT
        Y = COV8 + EPS(2)
        IPRED = COV8
      ENDIF
      IF(FREMTYPE.EQ.300) THEN
;       CHLDADLT
        Y = COV9 + EPS(2)
        IPRED = COV9
      ENDIF
      IF(FREMTYPE.EQ.400) THEN
;       CHLDDR
        Y = COV10 + EPS(2)
        IPRED = COV10
      ENDIF
      IF(FREMTYPE.EQ.500) THEN
;       CRWDINDX
        Y = COV11 + EPS(2)
        IPRED = COV11
      ENDIF
      IF(FREMTYPE.EQ.600) THEN
;       DURBRST
        Y = COV12 + EPS(2)
        IPRED = COV12
      ENDIF
      IF(FREMTYPE.EQ.700) THEN
;       FAGE
        Y = COV13 + EPS(2)
        IPRED = COV13
      ENDIF
      IF(FREMTYPE.EQ.800) THEN
;       FEDUCYRS
        Y = COV14 + EPS(2)
        IPRED = COV14
      ENDIF
      IF(FREMTYPE.EQ.900) THEN
;       FHTCM
        Y = COV15 + EPS(2)
        IPRED = COV15
      ENDIF
      IF(FREMTYPE.EQ.1000) THEN
;       GAGEBRTH
        Y = COV16 + EPS(2)
        IPRED = COV16
      ENDIF
      IF(FREMTYPE.EQ.1100) THEN
;       INCTOT
        Y = COV17 + EPS(2)
        IPRED = COV17
      ENDIF
      IF(FREMTYPE.EQ.1200) THEN
;       MAGE
        Y = COV18 + EPS(2)
        IPRED = COV18
      ENDIF
      IF(FREMTYPE.EQ.1300) THEN
;       FSMAGE
        Y = COV19 + EPS(2)
        IPRED = COV19
      ENDIF
      IF(FREMTYPE.EQ.1400) THEN
;       MATEMPQT
        Y = COV20 + EPS(2)
        IPRED = COV20
      ENDIF
      IF(FREMTYPE.EQ.1500) THEN
;       MEDUCYRS
        Y = COV21 + EPS(2)
        IPRED = COV21
      ENDIF
      IF(FREMTYPE.EQ.1600) THEN
;       MHTCM
        Y = COV22 + EPS(2)
        IPRED = COV22
      ENDIF
      IF(FREMTYPE.EQ.1700) THEN
;       NADULTF
        Y = COV23 + EPS(2)
        IPRED = COV23
      ENDIF
      IF(FREMTYPE.EQ.1800) THEN
;       NADULTM
        Y = COV24 + EPS(2)
        IPRED = COV24
      ENDIF
      IF(FREMTYPE.EQ.1900) THEN
;       NCHLD
        Y = COV25 + EPS(2)
        IPRED = COV25
      ENDIF
      IF(FREMTYPE.EQ.2000) THEN
;       NFCHILD
        Y = COV26 + EPS(2)
        IPRED = COV26
      ENDIF
      IF(FREMTYPE.EQ.2100) THEN
;       NMCHILD
        Y = COV27 + EPS(2)
        IPRED = COV27
      ENDIF
      IF(FREMTYPE.EQ.2200) THEN
;       NPERSON
        Y = COV28 + EPS(2)
        IPRED = COV28
      ENDIF
      IF(FREMTYPE.EQ.2300) THEN
;       NROOMS
        Y = COV29 + EPS(2)
        IPRED = COV29
      ENDIF
      IF(FREMTYPE.EQ.2400) THEN
;       PRTY
        Y = COV30 + EPS(2)
        IPRED = COV30
      ENDIF
      IF(FREMTYPE.EQ.2500) THEN
;       DLVLOCN
        Y = COV31 + EPS(2)
        IPRED = COV31
      ENDIF
      IF(FREMTYPE.EQ.2600) THEN
;       FEEDINGN
        Y = COV32 + EPS(2)
        IPRED = COV32
      ENDIF
      IF(FREMTYPE.EQ.2700) THEN
;       H2OAVAIL_2
        Y = COV33 + EPS(2)
        IPRED = COV33
      ENDIF
      IF(FREMTYPE.EQ.2800) THEN
;       H2OAVAIL_1
        Y = COV34 + EPS(2)
        IPRED = COV34
      ENDIF
      IF(FREMTYPE.EQ.2900) THEN
;       HCACCESS
        Y = COV35 + EPS(2)
        IPRED = COV35
      ENDIF
      IF(FREMTYPE.EQ.3000) THEN
;       HCUTILIZ_2
        Y = COV36 + EPS(2)
        IPRED = COV36
      ENDIF
      IF(FREMTYPE.EQ.3100) THEN
;       HCUTILIZ_1
        Y = COV37 + EPS(2)
        IPRED = COV37
      ENDIF
      IF(FREMTYPE.EQ.3200) THEN
;       HOMETYPE_4
        Y = COV38 + EPS(2)
        IPRED = COV38
      ENDIF
      IF(FREMTYPE.EQ.3300) THEN
;       HOMETYPE_3
        Y = COV39 + EPS(2)
        IPRED = COV39
      ENDIF
      IF(FREMTYPE.EQ.3400) THEN
;       HOMETYPE_2
        Y = COV40 + EPS(2)
        IPRED = COV40
      ENDIF
      IF(FREMTYPE.EQ.3500) THEN
;       MMARITN
        Y = COV41 + EPS(2)
        IPRED = COV41
      ENDIF
      IF(FREMTYPE.EQ.3600) THEN
;       RACEN_7
        Y = COV42 + EPS(2)
        IPRED = COV42
      ENDIF
      IF(FREMTYPE.EQ.3700) THEN
;       RACEN_6
        Y = COV43 + EPS(2)
        IPRED = COV43
      ENDIF
      IF(FREMTYPE.EQ.3800) THEN
;       RACEN_5
        Y = COV44 + EPS(2)
        IPRED = COV44
      ENDIF
      IF(FREMTYPE.EQ.3900) THEN
;       RACEN_3
        Y = COV45 + EPS(2)
        IPRED = COV45
      ENDIF
      IF(FREMTYPE.EQ.4000) THEN
;       RACEN_2
        Y = COV46 + EPS(2)
        IPRED = COV46
      ENDIF
      IF(FREMTYPE.EQ.4100) THEN
;       SANITATN_2
        Y = COV47 + EPS(2)
        IPRED = COV47
      ENDIF
      IF(FREMTYPE.EQ.4200) THEN
;       SANITATN_1
        Y = COV48 + EPS(2)
        IPRED = COV48
      ENDIF
      IF(FREMTYPE.EQ.4300) THEN
;       SESN_75
        Y = COV49 + EPS(2)
        IPRED = COV49
      ENDIF
      IF(FREMTYPE.EQ.4400) THEN
;       SESN_63
        Y = COV50 + EPS(2)
        IPRED = COV50
      ENDIF
      IF(FREMTYPE.EQ.4500) THEN
;       SESN_50
        Y = COV51 + EPS(2)
        IPRED = COV51
      ENDIF
      IF(FREMTYPE.EQ.4600) THEN
;       SESN_38
        Y = COV52 + EPS(2)
        IPRED = COV52
      ENDIF
      IF(FREMTYPE.EQ.4700) THEN
;       SEXN
        Y = COV53 + EPS(2)
        IPRED = COV53
      ENDIF
      IF(FREMTYPE.EQ.4800) THEN
;       SITEID_5
        Y = COV54 + EPS(2)
        IPRED = COV54
      ENDIF
      IF(FREMTYPE.EQ.4900) THEN
;       SITEID_4
        Y = COV55 + EPS(2)
        IPRED = COV55
      ENDIF
      IF(FREMTYPE.EQ.5000) THEN
;       SITEID_3
        Y = COV56 + EPS(2)
        IPRED = COV56
      ENDIF
      IF(FREMTYPE.EQ.5100) THEN
;       SITEID_2
        Y = COV57 + EPS(2)
        IPRED = COV57
      ENDIF
      IF(FREMTYPE.EQ.5200) THEN
;       SMOKED
        Y = COV58 + EPS(2)
        IPRED = COV58
      ENDIF
;;;FREM CODE END COMPACT
$THETA  -0.1047836 ; 1 BASE
$THETA  (0,3.18233) ; 2 PLMAX
$THETA  (0,1.12897) ; 3 HLKON
$THETA  (0,2.03569) ; 4 HLKOFF
$THETA  -0.0714391 ; 5 BASSL
$THETA  (0,10.2431) ; 6 BP
$THETA  49.0925 ; TV_BIRTHLEN
 2.98793 ; TV_BIRTHWT
 1.34531 ; TV_CHLDADLT
 0.816618 ; TV_CHLDDR
 3.67751 ; TV_CRWDINDX
 11.3277 ; TV_DURBRST
 30.1134 ; TV_FAGE
 8.27895 ; TV_FEDUCYRS
 161.666 ; TV_FHTCM
 272.581 ; TV_GAGEBRTH
 2.50892 ; TV_INCTOT
 26.102 ; TV_MAGE
 20.903 ; TV_FSMAGE
 1.91978 ; TV_MATEMPQT
 6.12035 ; TV_MEDUCYRS
 153.435 ; TV_MHTCM
 1.46965 ; TV_NADULTF
 1.34939 ; TV_NADULTM
 3.37218 ; TV_NCHLD
 1.7048 ; TV_NFCHILD
 1.67394 ; TV_NMCHILD
 4.68767 ; TV_NPERSON
 2.25132 ; TV_NROOMS
 2.49358 ; TV_PRTY
 2.45178 ; TV_DLVLOCN
 0.961874 ; TV_FEEDINGN
 0.463633 ; TV_H2OAVAIL_2
 0.414678 ; TV_H2OAVAIL_1
 0.801698 ; TV_HCACCESS
 0.322168 ; TV_HCUTILIZ_2
 0.382039 ; TV_HCUTILIZ_1
 0.0505207 ; TV_HOMETYPE_4
 0.288663 ; TV_HOMETYPE_3
 0.640464 ; TV_HOMETYPE_2
 1.52625 ; TV_MMARITN
 0.00324224 ; TV_RACEN_7
 0.0507502 ; TV_RACEN_6
 0.747817 ; TV_RACEN_5
 0.157179 ; TV_RACEN_3
 0.0256844 ; TV_RACEN_2
 0.493715 ; TV_SANITATN_2
 0.296268 ; TV_SANITATN_1
 0.12957 ; TV_SESN_75
 0.114098 ; TV_SESN_63
 0.261654 ; TV_SESN_50
 0.231197 ; TV_SESN_38
 1.48379 ; TV_SEXN
 0.12523 ; TV_SITEID_5
 0.143598 ; TV_SITEID_4
 0.383306 ; TV_SITEID_3
 0.0878441 ; TV_SITEID_2
 0.195456 ; TV_SMOKED
$OMEGA  BLOCK(58)
 0.423662  ;    1. BASE
 0.760108 6.64945  ;   2. PLMAX
 0.0711772 0.47947 0.388366  ;   3. HLKON
 -0.0238866 0.183486 0.127262 0.0517606  ;  4. HLKOFF
 -0.0458426 -0.176067 0.00475385 0.00339342 0.0111101  ;   5. BASSL
 -0.016797 0.208941 0.0356424 0.0188746 -0.000742972 0.0172747
 1.52839 2.98238 -0.0419266 -0.172929 -0.195615 -0.0640486 6.25491  ; BSV_BIRTHLEN
 0.218231 0.266777 0.00500809 -0.0235794 -0.0242664 -0.0230453 0.840239 0.254753  ; BSV_BIRTHWT
 -0.0758477 0.450398 -0.0256581 0.0168519 -0.0067971 0.0232385 -0.0845146 0.0114838 0.949703  ; BSV_CHLDADLT
 -0.0587429 0.143859 0.0127876 0.0206185 0.000478219 0.0129934 -0.142376 -0.0214662 0.26739 0.214759  ; BSV_CHLDDR
 -0.182598 1.02588 0.0591517 0.0738432 -0.00280009 0.0749858 -0.447009 -0.129558 0.647783 0.175769 3.71314  ; BSV_CRWDINDX
 -0.500755 3.83665 0.48535 0.262438 -0.0768604 0.161079 -0.716321 -0.226437 1.56275 0.468749 3.08013 93.2961  ; BSV_DURBRST
 0.143948 0.367829 -0.20112 -0.0731103 -0.0251257 -0.0597649 1.21799 0.326486 2.19873 0.0364917 1.52533 6.58464 51.2294  ;   BSV_FAGE
 0.435074 -1.72956 0.252037 -0.0117932 0.00786584 -0.0957987 0.834934 -0.073853 -1.55897 -0.261657 -1.88958 -5.49176 -3.10981 22.299  ; BSV_FEDUCYRS
 0.679616 -1.6329 0.703626 0.0716846 0.0975993 -0.095799 2.06493 0.49423 -0.762684 -0.190288 -2.14658 -6.58764 -2.7633 5.54988 37.8743  ;  BSV_FHTCM
 1.44406 2.70412 0.623026 -0.013323 -0.200378 -0.232216 5.97886 2.08865 0.472419 0.305294 -0.734867 -0.93728 1.3415 -2.93171 -2.79634
 218.061  ; BSV_GAGEBRTH
 0.0461744 -0.512217 -0.00936171 -0.0209678 0.00458966 -0.0289286 0.222258 0.0396238 -0.200882 -0.0665058 -0.718353 -1.17429 0.23672 1.89049 1.30553
 0.740233 1.25871  ; BSV_INCTOT
 0.160777 0.223367 -0.283805 -0.0884366 -0.0329279 -0.0563087 0.964857 0.27958 1.97955 -0.0352783 1.4524 5.96112 30.6048 -2.39099 -0.91478 -1.89902
 -0.0561613 35.9115  ;   BSV_MAGE
 0.297488 -2.10038 -0.114095 -0.12087 0.0217489 -0.11413 0.744537 0.204642 -0.775385 -0.210084 -2.10931 -5.51063 5.56848 3.69512 4.34637 0.172799
 1.03759 10.621 16.1996  ; BSV_FSMAGE
 0.0973175 0.0637286 -0.0804053 -0.0479508 -0.0139035 -0.0192996 0.349377 0.0909821 0.0613379 -0.0430571 -0.360559 -0.666488 1.83538 -0.149211
 -0.511582 0.56963 0.0519211 -0.328526 -0.142048 1.3184  ; BSV_MATEMPQT
 0.807685 -1.6761 0.0388005 -0.173545 -0.0293747 -0.186669 2.09405 0.296143 -1.47432 -0.443838 -3.24497 -8.83626 -2.37105 12.8297 7.46062 -2.37242
 2.00357 -1.53115 6.12291 -0.0682852 19.072  ; BSV_MEDUCYRS
 1.73653 -1.98869 0.094843 -0.287689 0.0412951 -0.264081 4.97657 0.857815 -1.13546 -0.555257 -2.40779 -9.56319 -0.630449 6.00425 4.2027 0.309925
 0.77373 -0.596949 3.88912 0.67929 9.25182 42.3279  ;  BSV_MHTCM
 0.107589 -0.0388025 -0.0255978 -0.0308349 -0.00580897 -0.0158177 0.282992 0.0215728 -0.327822 -0.215347 -0.111073 -0.262429 -0.363984 0.841844
 0.512994 -0.889499 0.15648 -0.0507187 0.32648 0.0457607 1.18828 1.09381 0.994646  ; BSV_NADULTF
 0.013756 -0.178542 -0.00893083 -0.0136911 0.00320961 -0.0136143 0.0151893 0.00974043 -0.28487 -0.184866 -0.0176365 -0.175055 0.0994901 0.551013
 0.24667 -0.470325 0.166565 0.288736 0.203456 0.0128353 0.606514 0.325659 0.477063 0.84866  ; BSV_NADULTM
 -0.0652927 0.505985 -0.0643539 0.000463398 -0.00587679 0.00364514 -0.0264303 0.0903665 1.28962 0.135365 1.27697 2.05423 5.1436 -2.4815 -0.867254
 0.572592 -0.151447 4.94282 -1.218 0.216737 -1.79724 -0.813158 0.38379 0.368097 3.77354  ;  BSV_NCHLD
 -0.014183 0.215411 0.00875869 0.0064929 -0.00293308 -0.0177793 -0.159161 0.0319422 0.655763 0.0604576 0.650011 0.99515 2.60431 -1.13207 -0.759519
 0.687374 -0.0696608 2.49074 -0.583182 0.122896 -0.772468 -0.249505 0.195782 0.177999 1.94131 1.86235  ; BSV_NFCHILD
 -0.0506446 0.280818 -0.0733926 -0.00652913 -0.00261624 0.0208476 0.131611 0.0599743 0.632951 0.073837 0.622094 1.02684 2.53704 -1.35888 -0.107098
 -0.0966505 -0.0819786 2.45121 -0.625768 0.0969379 -1.02181 -0.543359 0.188396 0.190588 1.83418 0.0803361 1.75452  ; BSV_NMCHILD
 0.0640538 1.32272 0.0175673 0.0123821 -0.0282648 0.0381278 0.304202 -0.00476191 0.827947 -0.00739916 2.62759 1.98604 3.19518 -2.26109 -1.92966
 -2.48891 -0.505323 3.44276 -1.94385 -0.0186455 -2.20161 -0.616748 0.512071 0.46449 2.51465 1.30053 1.21394 4.68333  ; BSV_NPERSON
 0.125158 -0.97814 -0.0821365 -0.0794754 0.0193264 -0.0772589 0.239389 0.184392 -0.0567902 -0.150919 -1.43351 -2.82664 1.35614 0.236508 1.11534
 1.04632 0.475092 1.33815 1.32479 0.407913 1.73893 2.54733 0.74318 0.638191 1.21277 0.639413 0.583006 0.134207 2.2469  ; BSV_NROOMS
 -0.061191 0.63751 0.0111411 0.0342134 -0.0118039 0.0212556 -0.0515489 0.00758975 0.688657 0.174082 0.863172 2.44559 4.01386 -1.24678 -0.971025
 0.0853581 -0.279749 3.94676 -1.12814 -0.0976105 -1.66755 -1.28478 -0.218409 -0.0983969 1.27206 0.636425 0.632951 1.07292 -0.165572
 1.35041  ;   BSV_PRTY
 0.0397023 -0.542722 -0.0442157 -0.0345669 0.00693298 -0.00708653 0.130279 0.00225904 -0.194737 0.00817464 -0.414834 -0.913401 -1.17699 1.65004 1.2897
 -0.637252 0.429132 -0.147816 0.844909 -0.0357212 1.68727 0.284277 0.143269 0.0627105 -0.315883 -0.144277 -0.171879 -0.541275 0.145322 -0.294591
 3.1992  ; BSV_DLVLOCN
 -0.00427088 0.0232064 0.00903998 0.00329563 -8.46394E-05 0.00085804 -0.0118882 0.000312171 0.0106893 0.00805084 0.0274491 0.548771 0.0100531
 0.0191682 0.166149 0.0902605 -0.00357989 -0.0346575 -0.052296 -0.0151944 -0.0409613 -0.0693178 -0.00868141 -0.00189054 0.00467261 0.00507582
 -0.000659738 -0.000915919 -0.0310082 0.012737 0.010974 0.053364  ; BSV_FEEDINGN
 0.0874574 -0.246248 -0.00937747 -0.0294526 0.00258399 -0.0210818 0.201472 0.0468244 -0.118389 -0.0696831 -0.256145 -1.09532 0.156129 0.681211
 0.325666 -0.00820552 0.106203 0.129865 0.495346 0.0534874 0.864152 1.07649 0.138391 0.0843736 -0.0409513 -0.00479139 -0.0341541 -0.0542504 0.308899
 -0.126203 0.0932974 -0.00824031 0.243576  ; BSV_H2OAVAIL_2
 -0.0551826 0.183116 0.00779902 0.0218077 -0.00327183 0.0122239 -0.116965 -0.0283728 0.0802641 0.0474876 0.173833 0.568965 -0.145158 -0.394619
 -0.187251 0.111 -0.0670307 -0.125077 -0.32949 -0.023782 -0.492512 -0.741518 -0.0976306 -0.0616582 0.0141642 -0.0126473 0.0253112 0.045527 -0.230678
 0.0829822 -0.0495328 0.00459782 -0.188699 0.23862  ; BSV_H2OAVAIL_1
 0.0015585 0.057458 0.0211323 0.0104104 -0.00229334 0.00405094 0.00333517 -0.0258955 -0.0544747 0.000969082 0.0474646 0.24054 0.0162981 0.580675
 0.0547686 -0.303011 0.041289 0.0197171 0.0368079 -0.0963261 0.220742 -0.12215 0.00944797 0.0125445 -0.118257 -0.0598359 -0.0601316 -0.0462118
 -0.124812 9.30881E-05 0.0254276 0.00483132 -0.00853433 0.0122719 0.159503  ; BSV_HCACCESS
 -0.00801307 -0.198484 -0.0036269 -0.006512 0.00687892 -0.000980566 -0.0211309 -0.005301 -0.0451036 -0.00844303 -0.0534154 -0.148584 0.019588 0.423381
 0.197425 -0.0197297 0.0826426 -0.0608935 0.186482 -0.0250557 0.301422 0.156905 0.012559 0.00494861 -0.10275 -0.0468189 -0.0558343 -0.110703 0.0185204
 -0.0637677 0.446339 0.00197485 0.0254542 -0.0212803 0.0377264 0.211287  ; BSV_HCUTILIZ_2
 0.0339704 0.0858104 -0.00949397 -0.00674093 -0.00657566 -0.00371295 0.119186 0.0121709 -0.00987994 -0.00864227 -0.0459667 -0.0292435 -0.0347474
 -0.00827293 0.0958459 -0.0405857 0.004873 0.0189884 0.018553 0.020623 0.136778 0.0853495 0.0194543 0.00859431 -0.00410639 -0.00833139 0.00400817
 -0.0242359 0.00631452 -0.00835584 0.137457 -0.000849168 0.00511459 0.00774839 -0.00106651 -0.118877 0.237435  ; BSV_HCUTILIZ_1
 0.0113563 -0.103189 -0.00289661 -0.00577263 0.000830022 -0.0085919 0.0440767 0.00794307 -0.0153663 -0.0171417 -0.147493 -0.200798 0.169103 0.333877
 0.353928 0.068296 0.114321 0.142004 0.191721 0.00525294 0.350229 0.214541 0.0792282 0.0683096 0.0714495 0.0377901 0.0336637 0.0371576 0.213652
 -0.0185474 0.0445293 -0.00347059 0.0276071 -0.0199293 9.66942E-05 0.00670595 0.000273214 0.112163  ; BSV_HOMETYPE_4
 0.0126459 -0.0536101 -0.00431301 -0.00596233 -0.000867779 -0.00465787 0.0416574 0.0106916 -0.00762533 -0.0133054 -0.0648581 -0.0955904 0.108215
 0.128033 -0.135766 0.0268881 0.04109 0.121943 0.0870289 0.00436607 0.158832 0.0804742 0.0501581 0.0410186 0.0632892 0.0324188 0.0309401 0.122099
 0.0567517 -0.00852734 0.0646936 -0.000535511 0.0503839 -0.0312178 -0.000774696 0.00604833 0.00459607 -0.056174 0.230083  ; BSV_HOMETYPE_3
 -0.0234136 0.123737 0.00940176 0.0120087 0.000659747 0.0115907 -0.0821655 -0.0167968 0.0226744 0.0318146 0.200148 0.22679 -0.261719 -0.432046
 -0.179039 -0.13814 -0.133033 -0.191136 -0.217353 -0.0377955 -0.451554 -0.231588 -0.137796 -0.10671 -0.136472 -0.0699728 -0.0665422 -0.277575
 -0.262237 0.032236 -0.100171 -0.00156687 -0.0741989 0.0487638 0.00122944 -0.010762 -0.00425631 -0.054879 -0.170887 0.241505  ; BSV_HOMETYPE_2
 0.280448 0.697914 -0.0751852 -0.0667252 -0.0325903 0.0175213 0.849385 0.0278509 -0.209612 -0.158706 -0.110185 -0.0361521 -1.4618 0.410953 0.164264
 -2.32034 -0.218542 -1.34889 -0.299768 0.183077 1.02845 1.81065 0.502919 0.00574944 -0.246336 -0.101586 -0.145692 0.317224 -0.0118459 -0.393372
 0.176054 -0.023211 0.126816 -0.0874503 -0.00718298 -0.001063 0.040804 -0.0211766 0.0133626 -0.0591916 2.51434  ; BSV_MMARITN
 -4.34424E-05 0.00254948 -0.000267841 3.1938E-05 -3.97719E-05 -0.000239257 0.000729363 0.000271789 0.00055784 -0.000373259 0.00498268 -0.00371317
 -0.00475501 -0.00579047 0.00737844 0.0347879 -0.00267169 -0.00181681 -0.0064954 -0.00011635 -0.00910051 -0.00108344 -0.000972449 -1.29015E-05
 0.00640739 0.00482522 0.0015784 0.0034393 -0.00208946 0.000895411 -0.00185448 -0.00023737 -0.00155618 0.0019874 -0.000150202 -0.000627824 8.68399E-05
 -0.0003068 -0.00134595 0.00138582 -0.0015996 0.00268052  ; BSV_RACEN_7
 0.00126294 0.036718 0.00875377 0.00297505 7.40128E-05 0.00177575 0.00429356 -0.000244562 0.0096588 -0.000410516 0.00897892 0.0441732 0.0418655
 -0.0791856 -0.00241769 -0.0997762 -0.0144449 0.0345551 -0.0160764 0.00372907 -0.048045 -0.0163667 -0.00695211 -0.00841168 0.00490728 -0.00352278
 0.00843691 0.016401 -0.00859829 0.00802189 -0.200032 0.00011207 -0.00498003 0.00730085 -0.00197576 -0.00114937 0.000756115 -0.00313405 -0.0042126
 0.00643479 0.0181047 -0.000180054 0.0525726  ; BSV_RACEN_6
 -0.00668002 -0.220616 0.0132576 0.000560385 0.00239871 -0.00836112 -0.0577077 0.0133576 -0.0528769 -0.0211967 -0.155643 -0.476274 -0.0238856 0.393695
 0.401838 0.430551 0.114172 -0.0404665 0.135395 0.0101054 0.380284 0.0974799 0.0276687 0.0321387 -0.0534348 -0.00392038 -0.0494517 -0.170322 0.0768841
 -0.0579708 0.189031 -0.00335406 0.0417403 -0.039773 0.00608853 0.00906626 0.00279668 0.0184238 0.00895908 -0.0239671 -0.0446105 -0.00202969
 -0.0407317 0.189583  ; BSV_RACEN_5
 0.00084331 0.148096 -0.0197919 -0.0036043 -0.00178636 0.00588873 0.0282605 -0.0147047 0.0395242 0.0187227 0.123396 0.460204 -0.0249399 -0.291899
 -0.399285 -0.415258 -0.0862112 0.00448542 -0.10326 -0.013411 -0.32077 -0.066316 -0.0173167 -0.0167386 0.0377524 0.00791875 0.0298137 0.133932
 -0.0562462 0.0418662 0.00145531 0.00449849 -0.0361701 0.0270361 -0.00634949 -0.00799694 -0.00505238 -0.0148126 -0.00312194 0.0164412 0.0251789
 -0.000298639 -0.00967918 -0.122273 0.139482  ; BSV_RACEN_3
 0.00119268 0.0167532 -0.00403019 -0.00114433 -0.000777132 -0.00174272 0.0149808 0.000296167 0.00431264 0.00225801 0.0178708 0.0100393 -0.0217626
 -0.0145368 -0.017948 0.0609011 -0.0081225 -0.0086854 -0.00952972 0.000504462 -0.0103571 -0.0197161 0.00247377 -0.00183561 0.0143656 0.0017092
 0.012597 0.0159411 -0.00806155 0.00434362 -0.00514692 -0.00080209 -0.00178229 0.00307935 0.00167573 -0.00217869 0.0019098 0.000978327 0.000382506
 -0.000115749 -0.000478574 -5.4826E-05 -0.00101119 -0.0121037 -0.00343788 0.0169551  ; BSV_RACEN_2
 0.101728 -0.225911 -0.010387 -0.0305333 0.00152705 -0.0211991 0.245672 0.0467273 -0.125372 -0.0665988 -0.234434 -1.02682 0.0291672 0.666735 0.299093
 -0.16581 0.0893914 0.0481406 0.470375 0.0528663 0.842666 1.21801 0.107732 0.0540325 -0.09932 -0.0367023 -0.0606297 -0.0812234 0.254438 -0.13992
 0.0943637 -0.00753179 0.157269 -0.102342 -0.00745988 0.0302843 0.00225329 0.0226202 0.0399781 -0.0595252 0.177123 -0.000630083 -0.00360823 0.0245525
 -0.0213992 -0.00203077 0.244728  ; BSV_SANITATN_2
 -0.048452 0.0259724 0.0248429 0.0199674 0.00230728 0.00654961 -0.166365 -0.0230272 0.00814776 0.0163956 0.082433 0.00718246 -0.136941 0.0437339
 0.0067136 0.0736364 -0.0462366 -0.0697319 -0.123964 -0.052271 -0.104802 -0.437808 -0.0428427 -0.0194864 -0.0249567 -0.00952158 -0.0160777 0.0524052
 -0.123496 0.0482861 -0.00969526 -0.00058938 -0.0707638 0.0657901 0.0215658 -0.0109539 0.00714194 -0.00987847 -0.024013 0.0356893 -0.110706
 -0.000389511 0.0041961 -0.00780197 -0.00407888 0.00549442 -0.14503 0.21048  ; BSV_SANITATN_1
 0.0214675 -0.0827773 -0.0113705 -0.0101143 -0.00108627 -0.00986969 0.0851659 0.0164036 -0.00687025 -0.0201252 -0.177296 -0.232888 0.180284 0.221323
 0.350354 0.0748502 0.116386 0.165653 0.218386 0.0411984 0.377546 0.25631 0.0857697 0.0696844 0.0961105 0.049943 0.0463665 0.0402889 0.245817
 -0.0234671 0.0393371 -0.00496432 0.0292413 -0.019642 -0.00364715 0.00261657 0.00481999 0.112113 -0.0557611 -0.0551936 -0.00574352 -0.000257448
 -0.00292214 0.0188455 -0.0154143 0.00132437 0.0238975 -0.0138721 0.116494  ; BSV_SESN_75
 0.0127769 -0.000945545 -0.00756818 -0.00585272 -0.00160308 -0.00222847 0.0521035 0.00557713 -0.00294879 -0.0118274 -0.051606 0.00327528 0.0900569
 0.0602634 0.0642502 -0.0202963 0.0245537 0.0647474 0.0224898 0.00788755 0.126483 0.131667 0.0459526 0.0317718 0.0446309 0.0251036 0.0194206 0.0500913
 0.0555949 -0.00513348 0.0396174 -0.000869406 0.0154659 -0.00838518 0.00257879 0.00519336 0.00354403 -0.016985 0.0689072 -0.0510267 0.0358759
 -0.000668615 -0.00116374 0.00388399 -0.00207691 -0.000166447 0.00242972 0.00136479 -0.0155795 0.101448  ; BSV_SESN_63
 0.0193677 -0.0353894 -0.0048404 -0.00641491 -0.00120295 -0.0044546 0.0494978 0.0160553 -0.00758339 -0.0107762 -0.051552 -0.199127 0.00824352
 -0.00761909 -0.191315 0.0190391 0.013657 0.0635227 0.107667 0.0347482 0.106782 0.100511 0.0202412 0.0116857 0.030237 0.0141522 0.0166178 0.0789134
 0.0444765 -0.0195498 0.020962 -0.00164384 0.0455475 -0.0292746 -0.0107907 -0.00269503 0.00563679 -0.039386 0.161823 -0.120731 0.0258196 -0.00067314
 -0.00267588 0.0049544 -0.00124846 0.000577701 0.0499722 -0.0335429 -0.0362293 -0.0307719 0.196814  ; BSV_SESN_50
 -0.0169105 0.0378649 0.0101747 0.00624479 0.00182608 0.00702015 -0.0590011 -0.0110996 0.0097722 0.0112628 0.101349 0.268718 -0.0289406 -0.110017
 0.0588114 -0.20423 -0.0648906 -0.0480252 -0.149905 -0.0327775 -0.236995 -0.142828 -0.0369153 -0.024129 -0.0292565 -0.0237548 -0.00569809 -0.0183086
 -0.109248 0.0261876 -0.054868 0.00353542 -0.0233048 0.0147726 0.00287038 -0.00430229 -0.0043888 -0.026801 -0.0830969 0.113531 -0.0179012 -0.000258184
 0.00392803 -0.0140053 0.0133163 -0.00183489 -0.0190642 0.00996812 -0.0303928 -0.0258734 -0.0610001 0.174786  ; BSV_SESN_38
 0.0157199 0.0322463 0.0366637 0.00969247 -0.00244017 -0.0116415 -0.138457 -0.021331 0.00258362 -0.00134469 0.0132845 0.0891492 0.0350079 0.0365421
 -0.211867 0.286802 -0.000366964 0.0164911 -0.00538982 0.00963368 0.0157921 -0.00356458 0.00703183 0.00175614 0.0162854 0.261677 -0.245403 0.0252177
 0.0102038 0.00368322 0.00671954 0.000929416 0.00305084 -0.00287809 0.000626364 -0.00395131 0.00338919 0.0027213 -0.000274267 -0.0023091 0.0119506
 0.000317583 -0.00417728 0.00245748 0.00283843 0.00176824 0.00333277 -0.000782821 0.00275654 0.000574512 -0.000425251 -0.00149778
 0.249751  ;   BSV_SEXN
 0.103172 0.240276 -0.0130698 -0.0188411 -0.0126722 0.00240367 0.31524 0.0105898 -0.0593351 -0.0400765 -0.0455595 0.0257044 -0.0283502 0.271353
 0.0872453 -0.67538 -0.022541 -0.00946581 0.0430186 0.0429775 0.440423 0.663034 0.0850759 0.00320763 -0.0986343 -0.0482747 -0.0511801 0.0341723
 -0.0292491 -0.0462548 -0.00196474 -0.00269741 0.0423876 -0.0272997 0.0103784 -0.00286412 0.0171134 -0.000493514 0.00115308 -0.0028663 0.298738
 -0.000230911 0.0011462 -0.00313952 0.00101029 -0.00074329 0.062163 -0.036167 0.00480427 0.0101446 0.00463472 -0.00724114 0.00381266
 0.109553  ; BSV_SITEID_5
 -0.00817186 0.13763 0.000906755 0.0111884 -0.00889056 -0.000395708 -0.00466374 -0.000178938 0.021079 0.0138594 -0.0761607 0.157927 -0.174565
 -0.125683 -0.00210838 -0.205234 0.00117361 0.0292835 0.0101763 0.0613524 0.146097 -0.403608 0.00252138 0.010067 0.0481247 0.0175401 0.0296438
 0.00157558 -0.0319465 0.027395 -0.0250771 -0.00344587 -0.0468464 0.0443856 0.00470514 -0.036794 0.0192514 -0.000200635 0.000579027 -0.00146319
 -0.0561909 0.00095371 -0.000145303 0.00236565 -0.0037689 0.00456335 -0.0621964 0.0448528 0.00973444 -0.00470183 0.00862898 -0.0080776 -0.0016166
 -0.0179838 0.122984  ; BSV_SITEID_4
 -0.0904982 -0.081194 0.058877 0.0362217 0.0112804 0.013598 -0.305127 -0.0731332 -0.0323651 0.0401723 0.254267 0.56983 0.042189 0.801237 -0.00179833
 -0.064246 0.0123264 -0.0790146 -0.243314 -0.278009 -0.284202 -0.63493 -0.0709903 -0.0123112 -0.16135 -0.0843503 -0.0795113 -0.042266 -0.302716
 0.0745476 0.037457 0.0132978 -0.0403154 0.020752 0.0760146 0.0366703 -0.0305005 0.00111447 -0.00400534 0.00480609 -0.200031 -0.000310313 -0.00243284
 2.11968E-05 0.00161886 -0.00128393 -0.0416406 0.0388502 -0.029181 -0.00838738 -0.0290033 0.0257706 -0.000945758 -0.048004 -0.0550449
 0.236395  ; BSV_SITEID_3
 -0.0229603 0.0904348 -0.0356216 -0.00874853 -0.00271384 0.00728113 0.0389898 0.00120677 0.106636 0.0285202 0.0603758 0.526333 0.249925 -0.571578
 -0.108541 0.22543 0.0166764 0.0935281 -0.16908 0.0508501 -0.42003 -0.429965 -0.0320503 -0.0204818 0.134925 0.0604042 0.0739454 0.0134904 -0.0188977
 0.050781 0.000423186 0.00302967 -0.0348181 0.0216961 -0.0232082 -0.000856236 0.00274487 -0.000576597 -0.000562545 0.00128656 -0.00514408 -0.000263491
 0.00114355 -0.0017292 0.00194156 -0.000176854 -0.0372274 -0.0220338 0.00675671 0.007163 -0.00546431 -0.00260909 -0.000791296 -0.0110013 -0.0126151
 -0.0336732 0.080132  ; BSV_SITEID_2
 -0.0273446 -0.0551638 0.00257379 0.000370134 0.0054644 -0.00493555 -0.11538 -0.0141407 0.0141808 0.00384358 0.0303878 -0.351851 -0.0873384 -0.292534
 -0.196232 0.134565 -0.0370984 -0.0528707 -0.104432 0.0157252 -0.240417 0.0903998 -0.00809172 -0.00453818 0.0627331 0.030598 0.033156 0.0640783
 0.0492416 0.0112161 -0.0875684 -0.00130597 0.000288263 -0.00421411 -0.0255465 -0.0115394 -0.00972112 -0.00452809 -0.00715588 0.014592 -0.0187309
 0.000119095 0.00373416 -0.0123975 0.00877162 -0.00113709 -0.000177141 -0.00501382 -0.0037425 -0.00458262 -0.000935998 0.000542036 0.00101024
 -0.0152232 -0.00872669 -0.0167706 0.000191957 0.18152  ; BSV_SMOKED
$SIGMA  0.19619
$SIGMA  1e-07  FIX  ;     EPSCOV
$ESTIMATION METHOD=IMPMAP AUTO=1 RANMETHOD=3P INTER NOABORT PRINT=1 CITER=15
            NOCOV=1 ISAMPEND=100 NITER=300 ISAMPLE=500 CTYPE=1  CALPHA=0.001
$ESTIMATION METHOD=IMPMAP INTER EONLY=1 NITER=10 ISAMPLE=1000 NOCOV=0
$COVARIANCE PRINT=E UNCONDITIONAL
$TABLE      ID BASE PLMAX HLKON HLKOFF BASSL BP ETA1 ETA2 ETA3 ETA4
            ETA5 ETA6 AGE AGEYI IWRES IPRED IPRED CWRES SITEID
            BIRTHLEN BIRTHWT CHLDADLT CHLDDR CRWDINDX DLVLOCN DURBRST
            FAGE FEDUCYRS FEEDINGN FHTCM GAGEBRTH H2OAVAIL HCACCESS
            HCUTILIZ HOMETYPE INCTOT MAGE FSMAGE MATEMPQT MEDUCYRS
            MHTCM MMARITN NADULTF NADULTM NCHLD NFCHILD NMCHILD
            NPERSON NROOMS PRTY RACEN SANITATN SESN SEXN SMOKED
            NOPRINT ONEHEADER FORMAT=S1PE20.10 FILE=xptab28
